# OpenSim document version 30000
ForwardTool grip_strength:
  model_file: default_activation.osim
  replace_force_set: false
  results_directory: grip_strength
  output_precision: 8
  initial_time: 0
  final_time: 0.15
  solve_for_equilibrium_for_auxiliary_states: true
  maximum_number_of_integrator_steps: 20000
  maximum_integrator_step_size: 0.0001
  minimum_integrator_step_size: 1e-8
  integrator_error_tolerance: 1e-5
  use_specified_dt: false
  AnalysisSet Analyses:
    JointReaction: start_time=0 end_time=0.15 step_interval=1 in_degrees=true joint_names=GripForceJoint
        apply_on_bodies=parent express_in_frame=parent
    ForceReporter: start_time=0 end_time=0.15 step_interval=1 in_degrees=true include_constraint_forces=false
  ControllerSet Controllers:
    ControlSetController: controls_file=controls.sto
