# OpenSim document version 30000
ForceSet reserves:
  # Reserve Motors to assist muscles
  CoordinateActuator [values shared by the 17 below unless stated]: min_control=-10 max_control=10 optimal_force=.01
  CoordinateActuator cmc_flexion_reserve: coordinate=cmc_flexion
  CoordinateActuator cmc_abduction_reserve: coordinate=cmc_abduction
  CoordinateActuator mp_flexion_reserve: coordinate=mp_flexion
  CoordinateActuator ip_flexion_reserve: coordinate=ip_flexion
  CoordinateActuator 4cmc_flexion_reserve: coordinate=4cmc_flexion
  CoordinateActuator 2mcp_abduction_reserve: coordinate=2mcp_abduction
  CoordinateActuator 2pm_flexion_reserve: coordinate=2pm_flexion
  CoordinateActuator 2md_flexion_reserve: coordinate=2md_flexion
  CoordinateActuator 3mcp_abduction_reserve: coordinate=3mcp_abduction
  CoordinateActuator 3pm_flexion_reserve: coordinate=3pm_flexion
  CoordinateActuator 3md_flexion_reserve: coordinate=3md_flexion
  CoordinateActuator 4mcp_abduction_reserve: coordinate=4mcp_abduction
  CoordinateActuator 4md_flexion_reserve: coordinate=4md_flexion
  CoordinateActuator 4pm_flexion_reserve: coordinate=4pm_flexion
  CoordinateActuator 5mcp_abduction_reserve: coordinate=5mcp_abduction
  CoordinateActuator 5pm_flexion_reserve: coordinate=5pm_flexion
  CoordinateActuator 5md_flexion_reserve: coordinate=5md_flexion
